*HEADING
PETG pillbox sleeve wall - nonlinear detent interference submodel
*NODE
1,-10.000000,0.000000,0.000000
2,-9.500000,0.000000,0.000000
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*ELEMENT,TYPE=C3D8R,ELSET=WALL
1,1,2,43,42,288,289,330,329
2,2,3,44,43,289,290,331,330
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*NSET,NSET=FIXED_EDGES
1,2,3,4,5,6
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*NSET,NSET=DETENT_PATCH
4031,4032,4033,4034,4035,4036
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*MATERIAL,NAME=PETG_PRINTED_XY
*ELASTIC
1939.,0.38
*PLASTIC
46.2,0.0
50.0,0.020
*SOLID SECTION,ELSET=WALL,MATERIAL=PETG_PRINTED_XY
*STEP,NLGEOM
*STATIC
0.05,1.0,1.E-05,0.10
*BOUNDARY
FIXED_EDGES,1,3,0.0
DETENT_PATCH,2,2,0.050000
*NODE FILE
U,RF
*EL FILE
S,PEEQ
*NODE PRINT,NSET=DETENT_PATCH,TOTALS=YES
RF
*EL PRINT,ELSET=WALL
S,PEEQ
*END STEP
